!! Default starting commands on opening an APDL session

/NOPR   ! Suppress printing of UNDO process
/PMACRO ! Echo following commands to log
FINISH  ! Make sure we are at BEGIN level
/CLEAR,NOSTART  ! Clear model since no SAVE found
! WE SUGGEST YOU REMOVE THIS LINE AND THE FOLLOWING STARTUP LINES
/input,menust,tmp,''
/GRA,POWER
/GST,ON
/PLO,INFO,3
/GRO,CURL,ON
/CPLANE,1
/REPLOT,RESIZE
WPSTYLE,,,,,,,,0
/REPLOT,RESIZE

! Set preferences to structural
!*
/NOPR
KEYW,PR_SET,1
KEYW,PR_STRUC,1
KEYW,PR_THERM,0
KEYW,PR_FLUID,0
KEYW,PR_ELMAG,0
KEYW,MAGNOD,0
KEYW,MAGEDG,0
KEYW,MAGHFE,0
KEYW,MAGELC,0
KEYW,PR_MULTI,0
/GO
!*
!! Start point for pymapdl I think
!*
/PREP7
!*
MPTEMP,,,,,,,,
MPTEMP,1,0

!! tube material
! Young's Mod
MPDATA,EX,1,,140000000000
! Poissons Ratio
MPDATA,PRXY,1,,0.34
! density
! 0.401kg = 8500
! nominal = 8960
MPDATA,DENS,1,,8500
! material damping - note there is an alternative way to do this (Rayleigh damping), which is frequency dependent
MPDATA,DMPR,1,,0.01

!! top mass
! Young's Mod
MPDATA,EX,2,,210000000000
! Poissons Ratio
MPDATA,PRXY,2,,0.3
! density
! 1.28kg = 8045
! nominal = 7850
MPDATA,DENS,2,,8045
! material damping - note there is an alternative way to do this (Rayleigh damping), which is frequency dependent
MPDATA,DMPR,2,,0.01


! Create element types
ET,1,BEAM188
ET,2,COMBIN14, 0,0,0
!ET,3,COMBIN39,0,1,0,1,0

! create keypoints for geometry
K,1,0,0,0
K,2,0.3,0,0
K,3,1.5,0,0
K,4,1.5785,0,0

! orientation keypoint
K,5,0,0.5,0,

! connect the keypoints with lines
LSTR,       1,       2
LSTR,       2,       3
LSTR,       3,       4

!! create cross-sections
SECTYPE,   1, BEAM, CTUBE, monopile, 0
SECOFFSET, CENT
SECDATA,0.0068,0.0075,0,0,0,0,0,0,0,0,0,0

! top mass
SECTYPE,  2, BEAM, CSOLID, topmass, 0
SECOFFSET, CENT
SECDATA,0.0254,0,0,0,0,0,0,0,0,0,0,0


!! Meshing monopile
!embedded length
MAT, 1
LSEL, , , ,       1
LATT,1,1,1, ,       5, ,1 ! sets KP orientation and cross section

! Set number of nodes for line
LESIZE,ALL,,,60, , , , ,1
!*
! Mesh it
LMESH,       1

!! Meshing monopile
!embedded length
MAT, 1
LSEL, , , ,       2
LATT,1,1,1, ,       5, ,1 ! sets KP orientation and cross section

! Set number of nodes for line
LESIZE,ALL,,,10, , , , ,1
!*
! Mesh it
LMESH,       2


! top mass
MAT, 1
LSEL, , , ,       3
LATT,1,1,1, ,       5, ,2 ! sets KP orientation and cross section

! Set number of nodes for line
LESIZE,ALL, , ,1, , , , ,1

!*
! Mesh it
LMESH,       3


! Workaround for selecting different material types post meshing
ESEL,,,,71,71
MPCHG,2,ALL
ESEL,ALL


! Turn on 3D plotting
/SHRINK,0
/ESHAPE,1.0
/EFACET,1
/RATIO,1,1,1
/CFORMAT,32,0
/REPLOT

! Boundary conditions

! for cantilever
!DK, 1, ALL,0

! for springs
DK, 1, UX,0


! Set spring constant

! good baseline
R,1,2850,0.01 ! stiffness and damping coefficients

! nodes for spring ends
! y-direction
N,200,0,0.1,0
N,201,0.005,0.1,0
N,202,0.01,0.1,0
N,203,0.015,0.1,0
N,204,0.02,0.1,0
N,205,0.025,0.1,0
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N,260,0.3,0.1,0


! z-direction
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N,321,0.3,0,0.1


! Change to correct element type
type, 2

! create spring elements
! y-direction
REAL, 1
!e,1,200
e,3,201
e,4,202
e,5,203
e,6,204
e,7,205
e,8,206
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e,2,260


! z-direction
!e,1,261
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e,2,321


! set boundary condition for fixed spring ends
D,200,ALL,0,,400

! apply loading
FK, 4, FY, -50

FINISH ! finish model set up and going into solution mode
/SOL

!! Modal Analysis
ANTYPE,2
! modal analysis settings
MODOPT,LANB,20,0,20, ,OFF
SOLVE
FINISH
